# 1.
A := 1.0
τ := 4
t := 0, 0.01 .. 20
T := 6
n := 0 .. 6*T/τ
n1 := 0, 0.1 .. 6*T/τ
C[n] :=
    A*τ/T if n == 0
    2*|(A/(n*π))*sin((n*π*τ)/T)| if n > 0
C1(n1) :=
    (A*τ/T) if n1 == 0
    2*|(A/(n1*π))*sin((n1*π*τ)/T)| if n1 > 0
f(t) := (A*τ/T) + sum(((2*A/(k*π))*sin((k*π*τ)/T))*cos((k*2*π*t)/T), k = 1 .. 20)
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# 2.
A := 1.0
τ := 1 + 0.5*FRAME
t := 0, 0.01 .. 20
T := 10
n := 0 .. 12
n1 := 0, 0.1 .. 12
C[n] :=
    A*τ/T if n == 0
    2*|(A/(n*π))*sin((n*π*τ)/T)| if n > 0
C1(n1) :=
    (A*τ/T) if n1 == 0
    2*|(A/(n1*π))*sin((n1*π*τ)/T)| if n1 > 0
f(t) := (A*τ/T) + sum(((2*A/(k*π))*sin((k*π*τ)/T))*cos((k*2*π*t)/T), k = 1 .. 20)
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# 3.
A := 1.0
τ := 1
t := 0, 0.01 .. 20
T := 3
n := 0 .. 6*T/τ
n1 := 0, 0.1 .. 6*T/τ
C[n] :=
    A*τ/T if n == 0
    2*|(A/(n*π))*sin((n*π*τ)/T)| if n > 0
C1(n1) :=
    (A*τ/T) if n1 == 0
    2*|(A/(n1*π))*sin((n1*π*τ)/T)| if n1 > 0
f(t) :=
    ((A*τ)/T) if FRAME == 0
    ((A*τ/T) + sum((((2*A/(k*π))*sin((k*π*τ)/T))*cos((k*2*π*t)/T)), k = 1 .. FRAME)) if FRAME > 0
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# 4.
A := 1.0
τ := 1
t := 0, 0.01 .. 20
T := 3
n := 0 .. 6*T/τ
n1 := 0, 0.1 .. 6*T/τ
C[n] :=
    A*τ/T if n == 0
    2*|(A/(n*π))*sin((n*π*τ)/T)| if n > 0
C1(n1) :=
    (A*τ/T) if n1 == 0
    2*|(A/(n1*π))*sin((n1*π*τ)/T)| if n1 > 0
f(t) :=
    ((A*τ)/T) if FRAME == 0
    ((A*τ/T) + sum((((2*A/(k*π))*sin((k*π*τ)/T))*cos((k*2*π*t)/T)), k = 1 .. 1)) if (FRAME > 0 and FRAME ≤ 5)
    ((A*τ/T) + sum((((2*A/(k*π))*sin((k*π*τ)/T))*cos((k*2*π*t)/T)), k = 1 .. 2)) if (FRAME > 5 and FRAME ≤ 10)
    ((A*τ/T) + sum((((2*A/(k*π))*sin((k*π*τ)/T))*cos((k*2*π*t)/T)), k = 1 .. 3)) if (FRAME > 10 and FRAME ≤ 15)
    ((A*τ/T) + sum((((2*A/(k*π))*sin((k*π*τ)/T))*cos((k*2*π*t)/T)), k = 1 .. 4)) if (FRAME > 15 and FRAME ≤ 20)
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