# Тест:
A0 := 5*10^-3
N := 8192
t := 0 .. (N - 1)
k := 0 .. N/2
Ω := (2.2*10^3)/11  # Оригиналы Ω=2.2 кГц; ω0=81 кГц
ω0 := (81*10^3)
T_Ω := 1/Ω = 0.005
T_ω0 := 1/ω0 = 1.23457e-5
T_Ω/T_ω0 = 405
Ω_1 := 11
ω0_1 := ω0/Ω = 405
M := 1.5
a[t] := A0*(1 + M*cos((2*π/N)*Ω_1*t))*cos(ω0_1*t*((2*π)/N))
b := fft(a)
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