# Лабораторная работа №3. Приближение функций
# I.
# 1) Интерполяционный полином Лагранжа
x := [-3; 2; 1; 5]
y := [2; 6; -4; 3]
L(z) := y[0]*((z - x[1])*(z - x[2])*(z - x[3])/((x[0] - x[1])*(x[0] - x[2])*(x[0] - x[3]))) + y[1]*((z - x[0])*(z - x[2])*(z - x[3])/((x[1] - x[0])*(x[1] - x[2])*(x[1] - x[3]))) + y[2]*((z - x[1])*(z - x[0])*(z - x[3])/((x[2] - x[1])*(x[2] - x[0])*(x[2] - x[3]))) + y[3]*((z - x[1])*(z - x[2])*(z - x[0])/((x[3] - x[1])*(x[3] - x[2])*(x[3] - x[0])))
z := -4, -3.99 .. 6
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# 2) Метод наименьших квадратов (МНК)
a0 := 0
a1 := 0
a2 := 0
a3 := 0
Given
(2*sum((a0 + a1*x[k] + a2*x[k]^2 + a3*x[k]^3) - y[k], k = 0 .. 3)) == 0
(2*sum(((a0 + a1*x[k] + a2*x[k]^2 + a3*x[k]^3) - y[k])*x[k], k = 0 .. 3)) == 0
(2*sum(((a0 + a1*x[k] + a2*x[k]^2 + a3*x[k]^3) - y[k])*x[k]^2, k = 0 .. 3)) == 0
(2*sum(((a0 + a1*x[k] + a2*x[k]^2 + a3*x[k]^3) - y[k])*x[k]^3, k = 0 .. 3)) == 0
M := Find(a0, a1, a2, a3)
M = [-13.1875; 7.51875; 2.3; -0.63125]
P(z) := M[0] + M[1]*z + M[2]*z^2 + M[3]*z^3
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# 3) Кубический сплайн (КС)
a1 := y[0]
b1 := 0
c1 := 0
d1 := 0
b2 := 0
c2 := 0
d2 := 0
a2 := y[1]
a3 := y[2]
b3 := 0
c3 := 0
d3 := 0
Given
a1 + b1*(x[1] - x[0]) + c1*(x[1] - x[0])^2 + d1*(x[1] - x[0])^3 == y[1]
a2 + b2*(x[2] - x[1]) + c2*(x[2] - x[1])^2 + d2*(x[2] - x[1])^3 == y[2]
a3 + b3*(x[3] - x[2]) + c3*(x[3] - x[2])^2 + d3*(x[3] - x[2])^3 == y[3]
b1 + 2*c1*(x[1] - x[0]) + 3*d1*(x[1] - x[0])^2 == b2
b2 + 2*c2*(x[2] - x[1]) + 3*d2*(x[2] - x[1])^2 == b3
2*c1 + 6*d1*(x[1] - x[0]) == 2*c2
2*c2 + 6*d2*(x[2] - x[1]) == 2*c3
2*c1 + 6*d1*(x[0] - x[0]) == 0
2*c3 + 6*d3*(x[3] - x[2]) == 0
S := Find(b1, b2, b3, c1, c2, c3, d1, d2, d3)
S = [-4.19468; 10.7894; 11.4181; 0; 2.99681; -3.62553; 0.199787; 2.20745; 0.302128]
b1 := S[0]
c1 := S[3]
d1 := S[6]
b2 := S[1]
c2 := S[4]
d2 := S[7]
b3 := S[2]
c3 := S[5]
d3 := S[8]
S(z) :=
    a1 + b1*(z - x[0]) + c1*(z - x[0])^2 + d1*(z - x[0])^3 if x[0] ≤ z ≤ x[1]
    a2 + b2*(z - x[1]) + c2*(z - x[1])^2 + d2*(z - x[1])^3 if x[1] ≤ z ≤ x[2]
    a3 + b3*(z - x[2]) + c3*(z - x[2])^2 + d3*(z - x[2])^3 if x[2] ≤ z ≤ x[3]
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# II.
g(x) := sin(x)*cos(x/3)
N := 8
i := 0 .. N - 1
a := 0
b := 2*π
h := (b - a)/(N - 1)
X1[i] := a + i*h
x := a, 0.01 .. b
Y1[i] := g(X1[i])
X1 = [0; 0.897598; 1.7952; 2.69279; 3.59039; 4.48799; 5.38559; 6.28319]
Y1 = [0; 0.747097; 0.805523; 0.270522; -0.158516; -0.0728565; 0.173974; 0]
# а)
f(z) := linterp(X1, Y1, z)
VS1 := lspline(X1, Y1)
VS2 := pspline(X1, Y1)
VS3 := cspline(X1, Y1)
f1(z) := interp(VS1, X1, Y1, z)
f2(z) := interp(VS2, X1, Y1, z)
f3(z) := interp(VS3, X1, Y1, z)
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u1 := [-1; 1; 2; 3; 4; 5; 6; 7]
u2 := [-1; 1; 2; 2.8; 4; 5.5; 6.5]
u3 := [-1; 1.5; 3; 3.5; 4.5; 6.5]
n1 := 1
n2 := 2
n3 := 3
VS4 := bspline(X1, Y1, u1, n1)
VS5 := bspline(X1, Y1, u2, n2)
VS6 := bspline(X1, Y1, u3, n3)
f4(z) := interp(VS4, X1, Y1, z)
f5(z) := interp(VS5, X1, Y1, z)
f6(z) := interp(VS6, X1, Y1, z)
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# б)
r1 := 2
r2 := 4
r3 := 7
R := line(X1, Y1)
f7(z) := R[1]*z + R[0]
R1 := medfit(X1, Y1)
f8(z) := R1[1]*z + R1[0]
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R2 := regress(X1, Y1, r1)
f9(z) := interp(R2, X1, Y1, z)
R3 := regress(X1, Y1, r2)
f10(z) := interp(R3, X1, Y1, z)
R4 := regress(X1, Y1, r3)
f11(z) := interp(R4, X1, Y1, z)
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span1 := 0.8
span2 := 1
span3 := 5
R5 := loess(X1, Y1, span1)
f12(z) := interp(R5, X1, Y1, z)
R5_1 := loess(X1, Y1, span2)
f12_1(z) := interp(R5_1, X1, Y1, z)
R5_2 := loess(X1, Y1, span3)
f12_2(z) := interp(R5_2, X1, Y1, z)
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R6 := expfit(X1, Y1)
f13(z) := R6[0]*e^(R6[1]*z) + R6[2]
q1 := [-2; 4; -4]
q2 := [0.75; 0.1; 0.2]
R6_1 := expfit(X1, Y1, q1)
f13_1(z) := R6_1[0]*e^(R6_1[1]*z) + R6_1[2]
R6_2 := expfit(X1, Y1, q2)
f13_2(z) := R6_2[0]*e^(R6_2[1]*z) + R6_2[2]
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