τ := 0.04*10^-3/12.2
fg := 13.2*10^6*6
T := 0.05*10^-3
N := T*fg = 3960
τ1 := 0.01*10^-3/5
2^12 = 4096
N := 4096
U(t) :=
    (Sgrow[0]*t + Sgrow[1]) if t ≤ 2*τ1
    (Sdecr[0]*t + Sdecr[1]) if 2*τ1 < t ≤ 4*τ1
    0 if 4*τ1 < t ≤ t_offset
    (0 + 1*cos(2*π*1.6*10^6*t)) if t_offset < t ≤ t_offset + τ
    1 if t_offset + τ < t ≤ t_offset + 1.5*τ
    (1 + 1*cos(2*π*3*10^6*t)) if t_offset + τ*1.5 < t ≤ t_offset + 2.5*τ
    2 if t_offset + 2.5*τ < t ≤ t_offset + 3*τ
    (2 + 1*cos(2*π*4.6*10^6*t)) if t_offset + 3*τ < t ≤ t_offset + 4*τ
    3 if t_offset + 4*τ < t ≤ t_offset + 4.5*τ
    (3 + 1*cos(2*π*6*10^6*t)) if t_offset + 4.5*τ < t ≤ t_offset + 5.5*τ
    4 if t_offset + 5.5*τ < t ≤ t_offset + 6*τ
    (4 + 1*cos(2*π*7.4*10^6*t)) if t_offset + 6*τ < t ≤ t_offset + 7*τ
    (3 + 1*cos(2*π*9*10^6*t)) if t_offset + 7*τ < t ≤ t_offset + 8.2*τ
    (2 + 1*cos(2*π*10.2*10^6*t)) if t_offset + 8.2*τ < t ≤ t_offset + 9.4*τ
    (0 + 2*cos(2*π*11.8*10^6*t)) if t_offset + 9.4*τ < t ≤ t_offset + 10.9*τ
    (0 + 1*cos(2*π*13.2*10^6*t)) if t_offset + 10.9*τ < t ≤ t_offset + 12.2*τ
t_offset := 5*τ1
a_grow := 0
b_grow := 0
t_grow_begin := 0
t_grow_end := 2*τ1
A_grow_begin := 0
A_grow_end := 2
Given
a_grow*t_grow_begin + b_grow == A_grow_begin
a_grow*t_grow_end + b_grow == A_grow_end
Sgrow := Find(a_grow, b_grow)
a_decr := 0
b_decr := 0
t_decr_begin := 2*τ1
t_decr_end := 4*τ1
A_decr_begin := 2
A_decr_end := 0
Given
a_decr*t_decr_begin + b_decr == A_decr_begin
a_decr*t_decr_end + b_decr == A_decr_end
Sdecr := Find(a_decr, b_decr)
U(t) :=
    1*cos(2*π*2*10^6*t) if t_offset < t ≤ t_offset + 0.7*τ
    (-1 + 1*cos(2*π*2*10^6*t)) if t_offset + 0.7*τ < t ≤ t_offset + 1.5*τ
    (1 + 1*cos(2*π*3.4*10^6*t)) if t_offset + 1.5*τ < t ≤ t_offset + 2.3*τ
    0 if t_offset + 2.3*τ < t ≤ t_offset + 2.7*τ
    1 if t_offset + 2.7*τ < t ≤ t_offset + 3.1*τ
    2 if t_offset + 3.1*τ < t ≤ t_offset + 3.4*τ
    1 if t_offset + 3.4*τ < t ≤ t_offset + 3.7*τ
    0 if t_offset + 3.7*τ < t ≤ t_offset + 4.1*τ
    (0 + 1*cos(2*π*4.8*10^6*t)) if t_offset + 4.1*τ < t ≤ t_offset + 5*τ
    (0 + 2*cos(2*π*6*10^6*t)) if t_offset + 5*τ < t ≤ t_offset + 5.9*τ
    2 if t_offset + 5.9*τ < t ≤ t_offset + 6.3*τ
    (2 + 1*cos(2*π*7*10^6*t)) if t_offset + 6.3*τ < t ≤ t_offset + 7.2*τ
    3 if t_offset + 7.2*τ < t ≤ t_offset + 7.6*τ
    (3 + 1*cos(2*π*8.2*10^6*t)) if t_offset + 7.6*τ < t ≤ t_offset + 8.8*τ
    3 if t_offset + 8.8*τ < t ≤ t_offset + 9.2*τ
    (3 + 2*cos(2*π*9.6*10^6*t)) if t_offset + 9.2*τ < t ≤ t_offset + 10*τ
    (2 + 1*cos(2*π*11*10^6*t)) if t_offset + 10*τ < t ≤ t_offset + 10.6*τ
    (1 + 1*cos(2*π*12.4*10^6*t)) if t_offset + 10.6*τ < t ≤ t_offset + 11.5*τ
    (0 + 1*cos(2*π*12.4*10^6*t)) if t_offset + 11.5*τ < t ≤ t_offset + 12.2*τ
t := 0, T/N .. T
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k := 0 .. N - 1
Δt := T/N
V[k] := U(k*Δt)  # error: This program has no return value. You must account for all cases when using conditional statements in a Mathcad program.
B := fft(V)
m := 0 .. N/2
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low_cutoff := 400
B_low_filter[m] :=
    B[m] if m < low_cutoff
    0 otherwise
high_cutoff := 10
B_high_filter[m] :=
    B[m] if m > high_cutoff
    0 otherwise
B_low_filter[m] := if(m < low_cutoff, B[m], 0)
V_after_low := ifft(B_low_filter)
V_after_high := ifft(B_high_filter)
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polosovoi_low := 300
zagrazhd_low := 300
polosovoi_high := 700
zagrazhd_high := 700
B_polosovoi_filter[m] :=
    B[m] if polosovoi_low < m ≤ polosovoi_high
    0 otherwise
B_zagrazhd_filter[m] :=
    0 if polosovoi_low < m ≤ polosovoi_high
    B[m] otherwise
V_after_polosovoi := ifft(B_polosovoi_filter)
V_after_zagrazhd := ifft(B_zagrazhd_filter)
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