f := 6.8*10^6
T := 0.1*10^-3
f*T = 680
N := 8192
a := 0
b := 0
Given
a*0 + b == 0
a*0.0085*10^-3 + b == 3
[S0; S1] := Find(a, b) = [352941; 0]
U(t) :=
    (S0*t + S1) if 0 ≤ t ≤ 0.0085*10^-3
    3 if 0.0085*10^-3 ≤ t ≤ 0.017*10^-3
    (3 + 1*sin(2*π*1.5*10^6*t)) if 0.017*10^-3 ≤ t ≤ 0.026*10^-3
    (2 + 1*sin(2*π*2.5*10^6*t)) if 0.026*10^-3 ≤ t ≤ 0.044*10^-3
    (0 + 2*sin(2*π*3.4*10^6*t)) if 0.044*10^-3 ≤ t ≤ 0.062*10^-3
    (0 + 1*sin(2*π*4.5*10^6*t)) if 0.062*10^-3 ≤ t ≤ 0.071*10^-3
    (1 + 1*sin(2*π*5.4*10^6*t)) if 0.071*10^-3 ≤ t ≤ 0.085*10^-3
    (0 + 1*sin(2*π*6.8*10^6*t)) if 0.085*10^-3 ≤ t ≤ T
Δt := T/N
k := 0 .. N - 1
V[k] := U(k*Δt)
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m := 0 .. N/2
b := fft(V)
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b1[m] :=
    b[m] if m ≥ 20
    0 otherwise
b1[m] := if(m ≥ 20, b1[m], 0)
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V1 := ifft(b1)
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b2[m] := if(m ≥ 400, b[m], 0)
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V2 := ifft(b2)
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b3[m] := if(50 ≤ m ≤ 150, 0, b[m])
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V3 := ifft(b3)
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b4[m] := if(500 ≥ m ≥ 100, b[m], 0)
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V4 := ifft(b4)
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