# Лабораторная работа №6
# Моделирование устройств фильтрации
# P0350 - модель фильтра; 03 - 3ий порядок; 50 - неравномерность в полосе пропускания; P - фильтр Баттерворта
# Структура Саллена-Ки; Полосовой фильтр
C_исходное := 5.7735026919*10^-1
a := 1.20093695518*10^0
k := 1
α[0] := 6.00468477588*10^-1
β[0] := 1.04004191152*10^0
γ[0] := α[0]^2 + β[0]^2 = 1.44225
j := sqrt(-1)
f_ср_л := 2.7*10^3
f_ср_п := 5.1*10^3
K_ФНЧ(p) := 1/(C_исходное*(p + a)*product(p^2 + 2*α[ν]*p + α[ν]^2 + β[ν]^2, ν = 0 .. k - 1))
K_ФНЧ(ω) := 1/(C_исходное*(j*ω + a)*product((j*ω)^2 + 2*α[ν]*j*ω + α[ν]^2 + β[ν]^2, ν = 0 .. k - 1))
# АЧХ фильтра-прототипа (ФНЧ):
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# Преобразование из прототипа ФНЧ к нормированному ПФ:
f0 := sqrt(f_ср_л*f_ср_п) = 3710.8
A := f0/(f_ср_п - f_ср_л) = 1.54616
C_ПФ := C_исходное*A^(2*k + 1) = 2.13406
a^2 - 4*A^2 = -8.12025  # Исходя из этого значения, так как оно меньше 0, используем формулу 7.16а (ЭРУД)
α_ПФ[0] := (α[0] + nthroot((α[0]^2 - β[0]^2 - 4*A^2)^2 + 4*α[0]^2*β[0]^2, 4)*cos(atan2(α[0]^2 - β[0]^2 - 4*A^2, 2*α[0]*β[0])/2))/(2*A) = 0.257042
β_ПФ[0] := |(β[0] + nthroot((α[0]^2 - β[0]^2 - 4*A^2)^2 + 4*α[0]^2*β[0]^2, 4)*sin(atan2(α[0]^2 - β[0]^2 - 4*A^2, 2*α[0]*β[0])/2))/(2*A)| = 1.37525
α_ПФ[1] := (α[0] - nthroot((α[0]^2 - β[0]^2 - 4*A^2)^2 + 4*α[0]^2*β[0]^2, 4)*cos(atan2(α[0]^2 - β[0]^2 - 4*A^2, 2*α[0]*β[0])/2))/(2*A) = 0.131318
β_ПФ[1] := |(β[0] - nthroot((α[0]^2 - β[0]^2 - 4*A^2)^2 + 4*α[0]^2*β[0]^2, 4)*sin(atan2(α[0]^2 - β[0]^2 - 4*A^2, 2*α[0]*β[0])/2))/(2*A)| = 0.702595
α_ПФ[2] := a/(2*A) = 0.38836
β_ПФ[2] := sqrt(4*A^2 - a^2)/(2*A) = 0.921508
γ_ПФ[0] := α_ПФ[0]^2 + β_ПФ[0]^2 = 1.95739
γ_ПФ[1] := α_ПФ[1]^2 + β_ПФ[1]^2 = 0.510884
γ_ПФ[2] := α_ПФ[2]^2 + β_ПФ[2]^2 = 1
K_ПФ(p) := p^(2*k + 1)/(C_ПФ*product(p^2 + 2*α_ПФ[ν]*p + γ_ПФ[ν], ν = 0 .. 2*k - 1 + 1))
K_ПФ(ω) := (j*ω)^(2*k + 1)/(C_ПФ*product((j*ω)^2 + 2*α_ПФ[ν]*(j*ω) + γ_ПФ[ν], ν = 0 .. 2*k - 1 + 1))
# АЧХ нормированного полосового фильтра:
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# Денормировка:
ωd := 2*π*f0 = 23315.6
α_ДПФ[0] := α_ПФ[0]*ωd
β_ДПФ[0] := β_ПФ[0]*ωd
γ_ДПФ[0] := γ_ПФ[0]*ωd^2
β_ДПФ[1] := β_ПФ[1]*ωd
α_ДПФ[1] := α_ПФ[1]*ωd
γ_ДПФ[1] := γ_ПФ[1]*ωd^2
β_ДПФ[2] := β_ПФ[2]*ωd
α_ДПФ[2] := α_ПФ[2]*ωd
γ_ДПФ[2] := γ_ПФ[2]*ωd^2
C_ДПФ := C_ПФ/ωd^(2*k + 1)
K_ДПФ(p) := p^(2*k + 1)/(C_ДПФ*product(p^2 + 2*α_ДПФ[ν]*p + γ_ДПФ[ν], ν = 0 .. 2*k - 1 + 1))
K_ДПФ(ω) := (j*ω)^(2*k + 1)/(C_ДПФ*product((j*ω)^2 + 2*α_ДПФ[ν]*(j*ω) + γ_ДПФ[ν], ν = 0 .. 2*k - 1 + 1))
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# ЧАСТОТНЫЕ ХАРАКТЕРИСТИКИ
# Денормированный ПФ | Нормированный ПФ
# 1. АЧХ
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# 2. ФЧХ
θ_ДПФ(ω) := arg(K_ДПФ(ω))
θ_ПФ(ω) := arg(K_ПФ(ω))
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# 3. ХРЗ - характеристика рабочего затухания
a_ДПФ(ω) := 10*log(1/|K_ДПФ(ω)|)
a_ПФ(ω) := 10*log(1/|K_ПФ(ω)|)
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# 4. ХГВЗ - Характеристика группового времени запаздывания
τ_ДПФ(ω) := -d/dω(θ_ДПФ(ω))
τ_ПФ(ω) := -d/dω(θ_ПФ(ω))
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# РАСЧЁТ ВРЕМЕННЫХ ХАРАКТЕРИСТИК
# Денормированный ПФ
# 1. ИХ - импульсная характеристика
t1 := 0, 0.00001 .. 0.01
K_ДПФ(ω) := (j*ω)^(2*k + 1)/(C_ДПФ*product((j*ω)^2 + 2*α_ДПФ[ν]*(j*ω) + γ_ДПФ[ν], ν = 0 .. 2*k - 1 + 1))
g_ДПФ(t1) := (1/(2*π))*integral(K_ДПФ(ω)*e^(j*ω*t1), ω = -70000 .. 70000)
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# 2. ПХ - Переходная характеристика
t2 := 0, 0.00001 .. 0.01
K_ДПФ(ω) := (j*ω)^(2*k + 1)/(C_ДПФ*product((j*ω)^2 + 2*α_ДПФ[ν]*(j*ω) + γ_ДПФ[ν], ν = 0 .. 2*k - 1 + 1))
h_ДПФ(t2) := (1/(2*π))*integral(K_ДПФ(ω)/(j*ω)*e^(j*ω*t2), ω = -70000 .. 70000)
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# ПОСТРОЕНИЕ ГОДОГРАФА КОМПЛЕКСНОЙ ПЕРЕДАТОЧНОЙ ФУНКЦИИ
ω := 0 .. 70000
K_ДПФ(ω) := (j*ω)^(2*k + 1)/(C_ДПФ*product((j*ω)^2 + 2*α_ДПФ[ν]*(j*ω) + γ_ДПФ[ν], ν = 0 .. 2*k - 1 + 1))
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# СХЕМНАЯ РЕАЛИЗАЦИЯ РАЗРАБАТЫВАЕМОГО ФИЛЬТРА
R5 := 1000
C_1 := 10*10^-9
C_2 := 10*10^-9
C_ДПФ = 1.68371e-13  # Необходимое условие:
C1 := nthroot(C_ДПФ, 3) = 5.5219e-5
1/(2*α_ДПФ[0]) = 8.34295e-5
C2 := nthroot(C_ДПФ, 3) = 5.5219e-5
1/(2*α_ДПФ[1]) = 0.000163304
C3 := nthroot(C_ДПФ, 3) = 5.5219e-5
1/(2*α_ДПФ[2]) = 5.5219e-5
C_исх := C1*C2*C3 = 1.68371e-13
C1_new := 9.0*10^-5
C2_new := 1.7*10^-4  # ***
C3_new := 5.6*10^-5
C_новое := C1_new*C2_new*C3_new = 8.568e-13
# Исходя из того, что k = 1 - все каскады будут являться повторителями, т.е. R4 = 0
# 1. Звено 1 (II порядка)
R4_1 := 0
R1_1 := C1_new/C_1 = 9000
R3_1 := C1_new*(2*α_ДПФ[0]*C1_new - 1)/(γ_ДПФ[0]*C1_new^2*(C_1 + C_2) - 2*α_ДПФ[0]*C_1*C1_new + C_1) = 41.3069
R2_1 := C1_new*(C_1 + C_2)/(C_1*C_2*(2*α_ДПФ[0]*C1_new - 1)) = 228557
# 2. Звено 2 (II порядка)
R4_2 := 0
R1_2 := C2_new/C_1 = 17000
R3_2 := C2_new*(2*α_ДПФ[1]*C2_new - 1)/(γ_ДПФ[1]*C2_new^2*(C_1 + C_2) - 2*α_ДПФ[1]*C_1*C2_new + C_1) = 43.5322
R2_2 := C2_new*(C_1 + C_2)/(C_1*C_2*(2*α_ДПФ[1]*C2_new - 1)) = 829247
# 3. Звено 3 (II) порядка)
R4_3 := 0
R1_3 := C3_new/C_1 = 5600
R3_3 := C3_new*(2*α_ДПФ[2]*C3_new - 1)/(γ_ДПФ[2]*C3_new^2*(C_1 + C_2) - 2*α_ДПФ[2]*C_1*C3_new + C_1) = 23.3263
R2_3 := C3_new*(C_1 + C_2)/(C_1*C_2*(2*α_ДПФ[2]*C3_new - 1)) = 791892
